P1000 := 0
P1001 := 0
P2111 := 0
T1 := 1 - 0.75
P2010 := 0
P2211 := 0
P1111 := 0
T2 := 1 - 0.7
P1010 := 0
P1211 := 0
P0211 := 0
P2011 := 0
P1011 := 0
Given
P1000 == P2010*T1 + P2011*T1*T2
P2010 == P1000 + P1010*T1 + P1001*T2 + P1011*T1*T2
P1010 == P2010*(1 - T1) + P2011*(1 - T1)*T2 + P2111*T1*T2
P2011 == P1010*(1 - T1) + P1001*(1 - T2) + P1011*T1*(1 - T2) + P1011*(1 - T1)*T2 + P1111*T1*T2
P1001 == P2011*T1*(1 - T2)
P1011 == P2011*(1 - T1)*(1 - T2) + P2111*T1*(1 - T2) + P2111*(1 - T1)*T2 + P2211*T1*T2
P2111 == P1011*(1 - T1)*(1 - T2) + P0211*T1*T2 + P1211*T1*T2 + P1111*T1*(1 - T2) + P1111*(1 - T1)*T2
P1111 == P2111*(1 - T1)*(1 - T2) + P2211*T1*(1 - T2) + P2211*(1 - T1)*T2
P2211 == P1111*(1 - T1)*(1 - T2) + P1211*(1 - T1)*T2 + P1211*T1*(1 - T2)
P1211 == P2211*(1 - T1)*(1 - T2)
P1000 + P2010 + P1010 + P2011 + P1001 + P1011 + P2111 + P1111 + P2211 + P1211 + P0211 == 1
F := Find(P1000, P2010, P1010, P2011, P1001, P1011, P2111, P1111, P2211, P1211, P0211)
[R1000; R2010; R1010; R2011; R1001; R1011; R2111; R1111; R2211; R1211; R0211] := F = [0.0283674; 0.0693613; 0.0941597; 0.147028; 0.0257299; 0.1298; 0.120766; 0.0863584; 0.0573901; 0.0301298; 0.210909]
A := 0.5*(1 - R0211) = 0.394546
L_оч := (R2211 + R1211 + R0211)*2 + (R2111 + R1111)*1 = 0.803982
W_оч := L_оч/A = 2.03774
